*Heading
** Job name: Job-brakeEM Model name: Model-1-Copy
** Generated by: Abaqus/CAE 2023
*Preprint, echo=NO, model=NO, history=NO, contact=NO
**
** PARTS
**
*Part, name=Rail
*Node
      1,   5921.98047,   944.406372,        2000.
      2,   5921.98047,   772.406372,        2000.
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*Element, type=C3D8RT
   1,    12,    11,   129,   128,  1228,  1129,  9052,  9051
   2,  8132,     8,     7,  8130, 13382,   832,   733, 13380
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*Nset, nset=Set-1, generate
     1,  20100,      1
*Elset, elset=Set-1, generate
     1,  14000,      1
** Section: rail
*Solid Section, elset=Set-1, controls=EC-1, material=Rail
,
*End Part
**
*Part, name=Wheel
*Node
      1,   732.829712,  -560.943481,           0.
      2,   457.826569,  -560.943481,   275.003113
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*Element, type=C3D8RT
  1, 2487,  178, 2459, 5390,  163,    1,  164, 2445
  2, 5390, 2459, 2460, 5391, 2445,  164,  165, 2446
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*Nset, nset=Set-1, generate
    1,  9184,     1
*Elset, elset=Set-1, generate
    1,  6776,     1
** Section: wheel
*Solid Section, elset=Set-1, controls=EC-1, material=Wheel
,
*End Part
**
*Part, name=brake
*Node
      1,   551.148438,   191.148438,          50.
      2,   371.148438,   502.917572,          50.
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*Element, type=C3D8RT
 1,   8,  67, 165,  87,   1,  13, 131,  50
 2,  67,  66, 166, 165,  13,  14, 132, 131
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*Nset, nset=Set-1, generate
   1,  266,    1
*Elset, elset=Set-1, generate
   1,  108,    1
** Section: Brake
*Solid Section, elset=Set-1, controls=EC-2, material=brake
,
*End Part
**
**
** ASSEMBLY
**
*Assembly, name=Assembly
**
*Instance, name=Rail-1, part=Rail
-6010.809046,  -782.734798,           0.
*End Instance
**
*Instance, name=Wheel-1, part=Wheel
 -709.581427,    33.323546,        573.3
 -709.581427,    33.323546,        573.3,  -709.581427,    33.323546, 574.300000012688, 89.9999992730282
*End Instance
**
*Instance, name=brake-1, part=brake
-148.637942801862, 421.184944925622, 840.413615543181
-148.637942801862, 421.184944925622, 840.413615543181, -148.888505607298, 422.120058039731, 840.163052737745, 93.8409664756632
*End Instance
**
*Instance, name=brake-1-rad-2, part=brake
-148.637942801862, 561.115309074378, 306.186384456819
-148.637942801862, 561.115309074378, 306.186384456819, -147.943196235651, 561.301465856986, 306.88113102303, 158.90941940681
*End Instance
**
*Node
      1,  -100.903435,   491.150116,   573.299988
*Node
      2,  -73.6379395,   671.150146,   879.069153
*Node
      3,  -123.637939,   671.150146,   267.530853
*Node
      4,  -98.6379395,   491.150116,   927.299988
*Node
      5,  -98.6379395,   491.150116,   219.300003
*Nset, nset=Set-43, instance=Rail-1
     2,     3,    22,    43,    45,    46
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*Elset, elset=Set-43, instance=Rail-1
    20,    23,    24,    35,    56,    59
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*Nset, nset=Set-44
 1,
*Nset, nset=Set-45, instance=brake-1, generate
   1,  266,    1
*Nset, nset=Set-45, instance=brake-1-rad-2, generate
   1,  266,    1
*Elset, elset=Set-45, instance=brake-1, generate
   1,  108,    1
*Elset, elset=Set-45, instance=brake-1-rad-2, generate
   1,  108,    1
*Nset, nset=Set-46
 1,
*Nset, nset=Set-47
 1,
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*Elset, elset=Set-49, instance=brake-1, generate
   1,  108,    1
*Elset, elset=Set-49, instance=brake-1-rad-2, generate
   1,  108,    1
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*Elset, elset=Set-55, instance=brake-1, generate
   1,  108,    1
*Elset, elset=Set-55, instance=brake-1-rad-2, generate
   1,  108,    1
*Nset, nset=Set-56
 1,
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*Nset, nset=Set-59
 1,
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*Nset, nset=Set-70, instance=Rail-1, generate
     1,  20100,      1
*Nset, nset=Set-70, instance=Wheel-1, generate
    1,  9184,     1
*Nset, nset=Set-70, instance=brake-1, generate
   1,  266,    1
*Nset, nset=Set-70, instance=brake-1-rad-2, generate
   1,  266,    1
*Elset, elset=Set-70, instance=Rail-1, generate
     1,  14000,      1
*Elset, elset=Set-70, instance=Wheel-1, generate
    1,  6776,     1
*Elset, elset=Set-70, instance=brake-1, generate
   1,  108,    1
*Elset, elset=Set-70, instance=brake-1-rad-2, generate
   1,  108,    1
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*Nset, nset=Set-73
 1,
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*Nset, nset=Set-79
 1,
*Nset, nset=Set-80
 4, 5
*Nset, nset=Set-81
 4, 5
*Nset, nset=Set-82
 4,
*Nset, nset=Set-83
 5,
*Nset, nset=Set-86, instance=Wheel-1, generate
    1,  9184,     1
*Nset, nset=Set-86, generate
 1,  5,  1
*Nset, nset=Set-86, instance=brake-1, generate
   1,  266,    1
*Nset, nset=Set-86, instance=brake-1-rad-2, generate
   1,  266,    1
*Elset, elset=Set-86, instance=Wheel-1, generate
    1,  6776,     1
*Elset, elset=Set-86, instance=brake-1, generate
   1,  108,    1
*Elset, elset=Set-86, instance=brake-1-rad-2, generate
   1,  108,    1
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*Nset, nset=Set-91
 4, 5
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*Nset, nset=m_Set-44
 1,
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*Nset, nset=m_Set-84
 4,
*Nset, nset=m_Set-85
 5,
*Nset, nset=s_Set-44, instance=Wheel-1, generate
    1,  9184,     1
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*Elset, elset=_Surf-7_S2, internal, instance=brake-1, generate
   1,  108,    1
*Elset, elset=_Surf-7_S2, internal, instance=brake-1-rad-2, generate
   1,  108,    1
*Surface, type=ELEMENT, name=Surf-7
_Surf-7_S2, S2
*Elset, elset=_Surf-10_S2, internal, instance=brake-1, generate
   1,  108,    1
*Elset, elset=_Surf-10_S2, internal, instance=brake-1-rad-2, generate
   1,  108,    1
*Surface, type=ELEMENT, name=Surf-10
_Surf-10_S2, S2
*Elset, elset=_m_Surf-5_S1, internal, instance=brake-1, generate
   1,  108,    1
*Surface, type=ELEMENT, name=m_Surf-5
_m_Surf-5_S1, S1
*Elset, elset=_m_Surf-6_S1, internal, instance=brake-1-rad-2, generate
   1,  108,    1
*Surface, type=ELEMENT, name=m_Surf-6
_m_Surf-6_S1, S1
*Elset, elset=_m_Surf-8_S3, internal, instance=Wheel-1
 1303, 1312, 1364, 1373, 1425, 1434
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*Elset, elset=_m_Surf-8_S4, internal, instance=Wheel-1, generate
 1311,  4666,    61
*Elset, elset=_m_Surf-8_S5, internal, instance=Wheel-1, generate
 1329,  4684,    61
*Elset, elset=_m_Surf-8_S6, internal, instance=Wheel-1, generate
 1332,  4687,    61
*Surface, type=ELEMENT, name=m_Surf-8
_m_Surf-8_S3, S3
_m_Surf-8_S4, S4
_m_Surf-8_S6, S6
_m_Surf-8_S5, S5
*Elset, elset=_m_Surf-11_S1, internal, instance=brake-1, generate
   1,  108,    1
*Surface, type=ELEMENT, name=m_Surf-11
_m_Surf-11_S1, S1
*Elset, elset=_m_Surf-13_S1, internal, instance=brake-1-rad-2, generate
   1,  108,    1
*Surface, type=ELEMENT, name=m_Surf-13
_m_Surf-13_S1, S1
*Elset, elset=_m_Surf-15_S3, internal, instance=Wheel-1
 1303, 1312, 1364, 1373, 1425, 1434
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*Elset, elset=_m_Surf-15_S4, internal, instance=Wheel-1, generate
 1311,  4666,    61
*Elset, elset=_m_Surf-15_S5, internal, instance=Wheel-1, generate
 1329,  4684,    61
*Elset, elset=_m_Surf-15_S6, internal, instance=Wheel-1, generate
 1332,  4687,    61
*Surface, type=ELEMENT, name=m_Surf-15
_m_Surf-15_S3, S3
_m_Surf-15_S4, S4
_m_Surf-15_S6, S6
_m_Surf-15_S5, S5
*Elset, elset=_m_Surf-17_S1, internal, instance=brake-1-rad-2, generate
   1,  108,    1
*Surface, type=ELEMENT, name=m_Surf-17
_m_Surf-17_S1, S1
*Elset, elset=_m_Surf-19_S1, internal, instance=brake-1, generate
   1,  108,    1
*Surface, type=ELEMENT, name=m_Surf-19
_m_Surf-19_S1, S1
*Elset, elset=_m_Surf-21_S3, internal, instance=Wheel-1
 1303, 1312, 1364, 1373, 1425, 1434
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*Elset, elset=_m_Surf-21_S4, internal, instance=Wheel-1, generate
 1311,  4666,    61
*Elset, elset=_m_Surf-21_S5, internal, instance=Wheel-1, generate
 1329,  4684,    61
*Elset, elset=_m_Surf-21_S6, internal, instance=Wheel-1, generate
 1332,  4687,    61
*Surface, type=ELEMENT, name=m_Surf-21
_m_Surf-21_S3, S3
_m_Surf-21_S4, S4
_m_Surf-21_S6, S6
_m_Surf-21_S5, S5
*Elset, elset=_s_Surf-8_S6, internal, instance=Rail-1
    14,    50,    86,   122,   158,   194
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*Elset, elset=_s_Surf-8_S4, internal, instance=Rail-1, generate
  7233,  10599,     34
*Elset, elset=_s_Surf-8_S3, internal, instance=Rail-1
    16,    52,    88,   124,   160,   196
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*Elset, elset=_s_Surf-8_S5, internal, instance=Rail-1, generate
 10633,  13999,     34
*Surface, type=ELEMENT, name=s_Surf-8
_s_Surf-8_S6, S6
_s_Surf-8_S4, S4
_s_Surf-8_S3, S3
_s_Surf-8_S5, S5
*Elset, elset=_s_Surf-11_S3, internal, instance=Wheel-1
 1303, 1312, 1364, 1373, 1425, 1434
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*Elset, elset=_s_Surf-11_S4, internal, instance=Wheel-1, generate
 1311,  4666,    61
*Elset, elset=_s_Surf-11_S5, internal, instance=Wheel-1, generate
 1329,  4684,    61
*Elset, elset=_s_Surf-11_S6, internal, instance=Wheel-1, generate
 1332,  4687,    61
*Surface, type=ELEMENT, name=s_Surf-11
_s_Surf-11_S3, S3
_s_Surf-11_S4, S4
_s_Surf-11_S6, S6
_s_Surf-11_S5, S5
*Elset, elset=_s_Surf-13_S3, internal, instance=Wheel-1
 1303, 1312, 1364, 1373, 1425, 1434
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*Elset, elset=_s_Surf-13_S4, internal, instance=Wheel-1, generate
 1311,  4666,    61
*Elset, elset=_s_Surf-13_S5, internal, instance=Wheel-1, generate
 1329,  4684,    61
*Elset, elset=_s_Surf-13_S6, internal, instance=Wheel-1, generate
 1332,  4687,    61
*Surface, type=ELEMENT, name=s_Surf-13
_s_Surf-13_S3, S3
_s_Surf-13_S4, S4
_s_Surf-13_S6, S6
_s_Surf-13_S5, S5
*Elset, elset=_s_Surf-15_S6, internal, instance=Rail-1
    14,    50,    86,   122,   158,   194
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*Elset, elset=_s_Surf-15_S4, internal, instance=Rail-1, generate
  7233,  10599,     34
*Elset, elset=_s_Surf-15_S3, internal, instance=Rail-1
    16,    52,    88,   124,   160,   196
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*Elset, elset=_s_Surf-15_S5, internal, instance=Rail-1, generate
 10633,  13999,     34
*Surface, type=ELEMENT, name=s_Surf-15
_s_Surf-15_S6, S6
_s_Surf-15_S4, S4
_s_Surf-15_S3, S3
_s_Surf-15_S5, S5
*Elset, elset=_s_Surf-17_S3, internal, instance=Wheel-1
 1303, 1312, 1364, 1373, 1425, 1434
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*Elset, elset=_s_Surf-17_S4, internal, instance=Wheel-1, generate
 1311,  4666,    61
*Elset, elset=_s_Surf-17_S5, internal, instance=Wheel-1, generate
 1329,  4684,    61
*Elset, elset=_s_Surf-17_S6, internal, instance=Wheel-1, generate
 1332,  4687,    61
*Surface, type=ELEMENT, name=s_Surf-17
_s_Surf-17_S3, S3
_s_Surf-17_S4, S4
_s_Surf-17_S6, S6
_s_Surf-17_S5, S5
*Elset, elset=_s_Surf-19_S3, internal, instance=Wheel-1
 1303, 1312, 1364, 1373, 1425, 1434
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*Elset, elset=_s_Surf-19_S4, internal, instance=Wheel-1, generate
 1311,  4666,    61
*Elset, elset=_s_Surf-19_S5, internal, instance=Wheel-1, generate
 1329,  4684,    61
*Elset, elset=_s_Surf-19_S6, internal, instance=Wheel-1, generate
 1332,  4687,    61
*Surface, type=ELEMENT, name=s_Surf-19
_s_Surf-19_S3, S3
_s_Surf-19_S4, S4
_s_Surf-19_S6, S6
_s_Surf-19_S5, S5
*Elset, elset=_s_Surf-21_S6, internal, instance=Rail-1
    14,    50,    86,   122,   158,   194
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*Elset, elset=_s_Surf-21_S4, internal, instance=Rail-1, generate
  7233,  10599,     34
*Elset, elset=_s_Surf-21_S3, internal, instance=Rail-1
    16,    52,    88,   124,   160,   196
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*Elset, elset=_s_Surf-21_S5, internal, instance=Rail-1, generate
 10633,  13999,     34
*Surface, type=ELEMENT, name=s_Surf-21
_s_Surf-21_S6, S6
_s_Surf-21_S4, S4
_s_Surf-21_S3, S3
_s_Surf-21_S5, S5
*Elset, elset=_s_Surf-23_S1, internal, instance=brake-1-rad-2, generate
   1,  108,    1
*Elset, elset=_s_Surf-23_S4, internal, instance=brake-1-rad-2, generate
  18,  108,   18
*Elset, elset=_s_Surf-23_S6, internal, instance=brake-1-rad-2, generate
  1,  91,  18
*Elset, elset=_s_Surf-23_S2, internal, instance=brake-1-rad-2, generate
   1,  108,    1
*Elset, elset=_s_Surf-23_S5, internal, instance=brake-1-rad-2
  37,  38,  39,  40,  41,  42
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*Surface, type=ELEMENT, name=s_Surf-23
_s_Surf-23_S1, S1
_s_Surf-23_S4, S4
_s_Surf-23_S6, S6
_s_Surf-23_S2, S2
_s_Surf-23_S5, S5
*Elset, elset=_s_Surf-24_S1, internal, instance=brake-1, generate
   1,  108,    1
*Elset, elset=_s_Surf-24_S4, internal, instance=brake-1, generate
  18,  108,   18
*Elset, elset=_s_Surf-24_S6, internal, instance=brake-1, generate
  1,  91,  18
*Elset, elset=_s_Surf-24_S2, internal, instance=brake-1, generate
   1,  108,    1
*Elset, elset=_s_Surf-24_S5, internal, instance=brake-1
  37,  38,  39,  40,  41,  42
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*Surface, type=ELEMENT, name=s_Surf-24
_s_Surf-24_S1, S1
_s_Surf-24_S4, S4
_s_Surf-24_S6, S6
_s_Surf-24_S2, S2
_s_Surf-24_S5, S5
*Surface, type=NODE, name=s_Set-44_CNS_, internal
s_Set-44, 1.
** Constraint: Constraint-1
*Coupling, constraint name=Constraint-1, ref node=m_Set-44, surface=s_Set-44_CNS_
*Kinematic, alpha=0.00014
** Constraint: Constraint-2
*Coupling, constraint name=Constraint-2, ref node=m_Set-84, surface=s_Surf-23
*Kinematic, alpha=0.00014
** Constraint: Constraint-3
*Coupling, constraint name=Constraint-3, ref node=m_Set-85, surface=s_Surf-24
*Kinematic, alpha=0.00014
*End Assembly
**
** ELEMENT CONTROLS
**
*Section Controls, name=EC-1, DISTORTION CONTROL=YES, hourglass=STIFFNESS
1., 1., 1.
*Section Controls, name=EC-2, DISTORTION CONTROL=YES, ELEMENT DELETION=YES, hourglass=STIFFNESS
1., 1., 1.
*Amplitude, name=Amp-1
             0.,              0.,           0.001,              1.
*Amplitude, name=Amp-2, definition=SMOOTH STEP
             0.,              0.,         0.00025,             0.1,         0.00035,             0.2,          0.0005,             0.5
         0.0006,             0.6,         0.00065,             0.8,         0.00075,             0.9,           0.001,              1.
*Amplitude, name=Amp-3
             0.,              0.,             0.1,              1.
*Amplitude, name=Amp-3-Copy
             0.,              0.,              1.,              1.,              6.,             0.2,            12.5,             0.1
*Amplitude, name=Amp-4
             0.,              1.,            0.05,              0.,              1.,              0.
**
** MATERIALS
**
*Material, name=Rail
*Conductivity
47.,
*Density
7830.,
*Elastic
 2.1e+11, 0.3
*Expansion
 0.00014,
*Inelastic Heat Fraction
         0.9,
*Plastic
 5.43e+08,0.
*Specific Heat
490.,
*Material, name=S355
*Conductivity
  52.,  20.
  51., 100.
  48., 200.
  44., 300.
  43., 400.
  39., 500.
 35.6, 600.
  32., 700.
  28., 723.
  26., 850.
 26.4, 900.
  30.,1250.
  30.,1450.
 120.,1500.
 120.,2000.
*Density
7860.,
*Elastic
 2.06e+11,  0.29,   20.
 2.03e+11,  0.29,  100.
 2.01e+11, 0.295,  200.
    2e+11,  0.31,  300.
 1.65e+11, 0.315,  400.
    1e+11,  0.32,  500.
    6e+10,  0.32,  600.
    4e+10,  0.33,  700.
    3e+10,  0.35,  800.
    2e+10,  0.36,  900.
    1e+10,  0.39, 1000.
    1e+10,  0.39, 1500.
*Expansion
 1.2e-05,  20.
 1.5e-05,1000.
 1.5e-05,1500.
*Inelastic Heat Fraction
         0.9,
*Latent Heat
270000.,1450.,1500.
*Plastic
 4.5e+08,   0.,  20.
 4.5e+08,   0., 100.
 4.2e+08,   0., 200.
 3.9e+08,   0., 300.
 3.2e+08,   0., 400.
 2.6e+08,   0., 500.
 1.7e+08,   0., 600.
   6e+07,   0., 700.
   5e+07,   0., 800.
   5e+07,   0., 900.
   5e+07,   0.,1000.
   5e+07,   0.,1500.
*Specific Heat
480.,  20.
507., 100.
532., 200.
574., 300.
624., 400.
703., 500.
788., 600.
870., 700.
798., 723.
679., 850.
658., 900.
666.,1250.
666.,1450.
670.,1500.
670.,2000.
*Material, name=Wheel
*Conductivity
 47.5,
*Density
7800.,
*Elastic
 2.06e+11, 0.3,200.
*Expansion
 0.00014,
*Inelastic Heat Fraction
         0.9,
*Plastic, hardening=COMBINED, datatype=PARAMETERS, number backstresses=1
 5.43e+08, 6.49e+09,     0.81,     200.
*Cyclic Hardening, parameters
 5.43e+08, 22.8, 0.47
*Specific Heat
490.,
*Material, name=brake
*Conductivity
58.,
*Density
7250.,
*Elastic
 2.4e+11, 0.3,200.
*Expansion
 0.00014,
*Inelastic Heat Fraction
         0.9,
*Specific Heat
500.,
**
** INTERACTION PROPERTIES
**
*Surface Interaction, name=IntProp-1
*Friction
 0.3,
*Surface Behavior, pressure-overclosure=HARD
*Surface Interaction, name=IntProp-2
*Friction
  0.3, , , 20.
 0.28, , ,200.
 0.25, , ,400.
*Surface Behavior, pressure-overclosure=HARD
*Gap Conductance
47., 0.
47., 9.
 0.,10.
*Gap Heat Generation
1., 0.5
*Surface Interaction, name=IntProp-2-Copy
*Friction
  0.3, , , 20.
 0.28, , ,200.
 0.25, , ,400.
*Surface Behavior, no separation, pressure-overclosure=HARD
*Gap Conductance
47., 0.
47., 9.
 0.,10.
*Gap Heat Generation
15., 0.7
**
** BOUNDARY CONDITIONS
**
** Name: BC-Wheel Type: Displacement/Rotation
*Boundary
Set-56, 1, 1
Set-56, 2, 2
Set-56, 4, 4
Set-56, 5, 5
Set-56, 6, 6
** Name: BC-rail Type: Displacement/Rotation
*Boundary
Set-43, 1, 1
Set-43, 2, 2
Set-43, 3, 3
Set-43, 4, 4
Set-43, 5, 5
Set-43, 6, 6
**
** PREDEFINED FIELDS
**
** Name: Predefined Field-1   Type: Velocity
*Initial Conditions, type=VELOCITY
Set-86, 3, 19.44
** Name: Predefined Field-2   Type: Stress
*Initial Conditions, type=STRESS, file="C:/Users/IranArgham/Desktop/new Pro/brake/Job-Dy.odb", step=2, inc=10
** Name: Predefined Field-3   Type: Temperature
*Initial Conditions, type=TEMPERATURE
Set-70, 20.
** Name: Predefined Field-4   Type: Velocity
*Initial Conditions, type=VELOCITY
Set-79, 1, 60.
** ----------------------------------------------------------------
**
** STEP: Step-1
**
*Step, name=Step-1, nlgeom=YES
*Dynamic Temperature-displacement, Explicit, element by element
, 12.5,, 1e-05
*Bulk Viscosity
0.06, 1.2
**
** BOUNDARY CONDITIONS
**
** Name: BC-6 Type: Displacement/Rotation
*Boundary, op=NEW
Set-80, 1, 1
Set-80, 5, 5
Set-80, 6, 6
** Name: BC-8 Type: Velocity/Angular velocity
*Boundary, op=NEW, amplitude=Amp-3-Copy, type=VELOCITY
Set-91, 2, 2, -2.
** Name: BC-A-Brake Type: Acceleration/Angular acceleration
*Boundary, op=NEW, type=ACCELERATION
Set-81, 3, 3, -1.5
** Name: BC-A-Wheel Type: Acceleration/Angular acceleration
*Boundary, op=NEW, type=ACCELERATION
Set-73, 3, 3, -1.5
** Name: BC-Wheel Type: Displacement/Rotation
*Boundary, op=NEW
Set-56, 1, 1
Set-56, 2, 2
Set-56, 5, 5
Set-56, 6, 6
** Name: BC-rail Type: Displacement/Rotation
*Boundary, op=NEW
Set-43, 1, 1
Set-43, 2, 2
Set-43, 3, 3
Set-43, 4, 4
Set-43, 5, 5
Set-43, 6, 6
**
** LOADS
**
** Name: Load-4   Type: Concentrated force
*Cload
Set-82, 3, -1e+09
** Name: Load-5   Type: Concentrated force
*Cload
Set-83, 3, 1e+09
** Name: Load-g   Type: Gravity
*Dload, amplitude=Amp-1
, GRAV, 9.8, 0., -1., 0.
** Name: Load-w   Type: Concentrated force
*Cload
Set-59, 2, -110000.
**
** INTERACTIONS
**
** Interaction: Int-Brake1
*Contact Pair, interaction=IntProp-2-Copy, mechanical constraint=PENALTY, cpset=Int-Brake1
m_Surf-17, s_Surf-17
** Interaction: Int-Brake2
*Contact Pair, interaction=IntProp-2-Copy, mechanical constraint=PENALTY, cpset=Int-Brake2
m_Surf-19, s_Surf-19
** Interaction: Int-Rail
*Contact Pair, interaction=IntProp-2, mechanical constraint=KINEMATIC, cpset=Int-Rail
s_Surf-21, m_Surf-21
**
** OUTPUT REQUESTS
**
*Restart, write, number interval=1, time marks=NO
**
** FIELD OUTPUT: F-Output-1
**
*Output, field, variable=PRESELECT, number interval=50
**
** HISTORY OUTPUT: H-Output-1
**
*Output, history, variable=PRESELECT
*End Step
